@DSL Implicit;

@Behaviour Voce;
@Author Thomas Helfer;
@Date 02 / 04 / 2021;
@Description {
}

@ModellingHypotheses{".+"};
@StrainMeasure Hencky;

@Algorithm NewtonRaphson;
@Epsilon 1.e-14;
@Theta 1;

@Brick StandardElastoViscoPlasticity{
  stress_potential : "Hooke" {
//    young_modulus : 70e9,
//    poisson_ratio : 0.34
    young_modulus : 206.9e9,
    poisson_ratio : 0.29
  },
  inelastic_flow : "Plastic" {
    criterion : "Mises",
//    isotropic_hardening : "Voce" {R0 : 300.e6, Rinf : 100.e6, b : 10}
//    isotropic_hardening : "Voce" {R0 : 300.e6, Rinf : 400.e6, b : 10}}
//    --------- WITHOUT LINEAR HARDENING
//    isotropic_hardening : "Voce" {R0 : 450.e6, Rinf : 715.e6, b : 16.93}
//    --------- WITH LINEAR HARDENING
    isotropic_hardening : "Voce" {R0 : 450.e6, Rinf : 715.e6, b : 16.93},
    isotropic_hardening : "Linear" {R0 : 0., H : 129.2e6}
//    isotropic_hardening : "Voce" {R0 : 300.e6, Rinf : 900.e6, b : 16.93}
  }
};
