@Author Thomas Helfer;
@Date   11/02/2021;
@Description{

};

@ModellingHypothesis 'Axisymmetrical';
//@ModellingHypothesis 'PlaneStrain';
@Behaviour<generic> '../behaviour_elasticity_large_strain/src/libBehaviour.so' 'elasticity_large_strain';

// external state variable
@ExternalStateVariable 'Temperature' 293.15;

//@ImposedStrain 'EXX' {
//  0 : 0,
//  1 : 7.e-3,
//  2 : -1.e-2,
//  3 : 2.e-2,
//  4 : -3e-2,
//  5 : 4e-2
//};

@ImposedDeformationGradient 'FZZ' {
  0 : 1,
  1 : 1.1
};

@ImposedDeformationGradient 'FRZ' 0.;
@ImposedDeformationGradient 'FZR' 0.;

@Times{0, 1 in 20};
