@Parser DefaultFiniteStrainParser;
@Author Thomas Helfer;
@Behaviour Signorini;
@Date 9 / 12 / 2016;
@Description {
  Implementation of the Signorini hyperelastic behaviour
}

//C10=2.668;
//C01=0.271;
//C20=0.466;
//K=2939;
//xnu=0.499;
//K=4*(1+xnu)*(C10+C01)/3/(1-(2*xnu));
//xyoun=4*(1+xnu)*(C10+C01);

//@MaterialProperty stress K;
//K.setGlossaryName("BulkModulus");
//@MaterialProperty stress C10;
//@MaterialProperty stress C01;
//@MaterialProperty stress C20;

@Parameter K = 2939;
K.setGlossaryName("BulkModulus");
@Parameter C10 = 2.668;
//C10.setGlossaryName("C10");
@Parameter C01 = 0.271;
//C01.setGlossaryName("C01");
@Parameter C20 = 0.466;
//C20.setGlossaryName("C20");

@LocalVariable StiffnessTensor dS_dC;

@Integrator {
  const auto id = Stensor::Id();
  const auto J = det(F1);
  const auto C = computeRightCauchyGreenTensor(F1);
  const auto C2 = square(C);
  /* invariants and derivatives */
  const auto I1 = trace(C);
  const auto I2 = (I1 * I1 - trace(C2)) / 2;
  const auto dI2_dC = I1 * id - C;
  const auto I3 = J * J;
  const auto dI3_dC = C2 - I1 * C + I2 * id;
  /* volumetric part */
  // Pv = K*(J-1)*(J-1)/2
  const auto dPv_dJ = K * (J - 1);
  const StressStensor Sv = dPv_dJ / J * dI3_dC;
  /* iscochoric part */
  // I1b = J^{-2/3}*I1 = I1/(sqrt[3]{I3})     = I1*iJb
  // I2b = J^{-4/9}*I2 = I2/(sqrt[3]{I3})^{2} = I2*iJb*iJb
  const auto iJb = 1 / cbrt(I3);
  const auto iJb2 = iJb * iJb;
  const auto iJb4 = iJb2 * iJb2;
  const auto diJb_dI3 = -iJb4 / 3;
  const auto diJb_dC = diJb_dI3 * dI3_dC;
  const auto I1b = I1 * iJb;
  const auto dI1b_dC = iJb * id + I1 * diJb_dC;
  const auto dI2b_dC = iJb2 * dI2_dC + 2 * I2 * iJb * diJb_dC;
  const auto dPi_dI1b = C10 + 2 * C20 * (I1b - 3);
  const auto dPi_dI2b = C01;
  const StressStensor Si = 2 * (dPi_dI1b * dI1b_dC + dPi_dI2b * dI2b_dC);
  sig = convertSecondPiolaKirchhoffStressToCauchyStress(Sv + Si, F1);
  if (computeTangentOperator_) {
    /* invariants second derivatives */
    const auto d2I3_dC2 = Stensor4::dsquare(C) - (C ^ id) - I1 * Stensor4::Id() + (id ^ dI2_dC);
    const auto d2I2_dC2 = (id ^ id) - Stensor4::Id();
    const auto iJb7 = iJb4 * iJb2 * iJb;
    const auto d2iJb_dI32 = 4 * iJb7 / 9;
    const auto d2iJb_dC2 = d2iJb_dI32 * (dI3_dC ^ dI3_dC) + diJb_dI3 * d2I3_dC2;
    const auto d2I1b_dC2 = (id ^ diJb_dC) + (diJb_dC ^ id) + I1 * d2iJb_dC2;
    const auto d2I2b_dC2 = 2 * iJb * (dI2_dC ^ diJb_dC) + iJb2 * d2I2_dC2 +
                           2 * iJb * (diJb_dC ^ dI2_dC) + 2 * I2 * (diJb_dC ^ diJb_dC) +
                           2 * I2 * iJb * d2iJb_dC2;
    /* volumetric part */
    const auto d2Pv_dJ2 = K;
    const auto dSv_dC =
        (d2Pv_dJ2 - dPv_dJ / J) / (2 * I3) * (dI3_dC ^ dI3_dC) + dPv_dJ / J * d2I3_dC2;
    /* isochoric part */
    const auto d2Pi_dI1b2 = 2 * C20;
    const auto dSi_dC =
        2 * (d2Pi_dI1b2 * (dI1b_dC ^ dI1b_dC) + dPi_dI1b * d2I1b_dC2 + +dPi_dI2b * d2I2b_dC2);
    dS_dC = dSv_dC + dSi_dC;
  }
}

@TangentOperator<DS_DC> {
  Dt = dS_dC;
}
